*Heading
** Job name: Job-1 Model name: Model-1
** Generated by: Abaqus/CAE 2024.HF2
*Preprint, echo=NO, model=NO, history=NO, contact=NO
**
** PARTS
**
*Part, name=Part-3
*Node
      1,        -47.5,         -10.,         100.
      2,        -47.5,           0.,         100.
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*Element, type=C3D8R
  1,  45,  46,  50,  49,   1,   2,   6,   5
  2,  46,  47,  51,  50,   2,   3,   7,   6
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*End Part
**
**
** ASSEMBLY
**
*Assembly, name=Assembly
**
*Instance, name=Part-3-1, part=Part-3
*End Instance
**
*Instance, name=Part-3-2, part=Part-3
*End Instance
**
*End Assembly
**
** MATERIALS
**
*Material, name=Material-1
*Material, name=Material-2
*Material, name=Material-3
